<?xml version="1.0"?>
<?xml-stylesheet type="text/xsl" href="http://jsbsim.sourceforge.net/JSBSim.xsl"?>
<fdm_config xmlns:xsi="http://www.w3.org/2001/XMLSchema-instance" xsi:noNamespaceSchemaLocation="http://jsbsim.sourceforge.net/JSBSim.xsd"
		name="kentavros" version="2.0" release="ALPHA">

<fileheader>
	<author>Aleksandr Malikov</author>
	<filecreationdate>2018-07-14</filecreationdate>
	<version>$Revision: 1.0 $</version>
	<description>Kentavros</description>
</fileheader>

<metrics>
	<wingarea  unit="M2"> 1.16 </wingarea>
	<wingspan  unit="M" > 2.73 </wingspan>
	<wing_incidence>      0.0  </wing_incidence>
	<chord     unit="M" > 0.47 </chord>
	<htailarea unit="M2"> 0.29 </htailarea>
	<htailarm  unit="M" >-0.76 </htailarm>
	<location name="AERORP" unit="M">
		<x> 1.00</x>
		<y> 0</y>
		<z> 0</z>
	</location>
	<location name="EYEPOINT" unit="M">
		<x> 1.00</x>
		<y> 0.0</y>
		<z> 0.0</z>
	</location>
	<location name="VRP" unit="M">
		<x> 0</x>
		<y> 0</y>
		<z> 0</z>
	</location>
</metrics>

<mass_balance>
	<ixx unit="KG*M2"> 7.26</ixx> <!--  7.26 plane,  7.73 plane+stand -->
	<ixy unit="KG*M2"> 0.05</ixy>
	<ixz unit="KG*M2"> 1.69</ixz>
	<iyy unit="KG*M2">17.63</iyy> <!-- 17.63 plane, 18.09 plane+stand -->
	<iyz unit="KG*M2"> 0.01</iyz>
	<izz unit="KG*M2">23.81</izz> <!-- 23.81 plane, 24.73 plane+stand -->
	<emptywt unit="KG">34.90</emptywt>
	<location name="CG" unit="M">
		<x> 1.00</x>
		<y> 0</y>
		<z> 0</z>
	</location>
</mass_balance>

<ground_reactions file="kentavros-gnd.xml" />
<propulsion file="kentavros-propulsion.xml" />
<flight_control file="kentavros-fcs.xml" />
<aerodynamics file="kentavros-no-twist-aero.xml" />

<!--output name="kentavros.csv" type="CSV" rate="60">
	<rates> ON </rates>
	<velocities> ON </velocities>
	<position> ON </position>
	<fcs> ON </fcs>
</output-->

</fdm_config>
